// COMSOL Multiphysics 6.0.0.354 model "WholeCell2D_CmGox_nosolution.mph"
// 2D model
// Outline of the model tree

Parameters
  Rcell = 10[um]  // Cell radius
  del = 20*Rcell  // Distance between electrodes
  sigma_e = 1.5[S/m]  // Extracellular conductivity
  epsilon_e = 80  // Extracellular permittivity
  sigma_i = 0.5[S/m]  // Intracellular conductivity
  epsilon_i = 80  // Intracellular permittivity
  dm = 5[nm]  // Membrane thickness
  C0 = 1[uF/cm^2]  // Membrane capacitance
  G0 = 0.01[S/m^2]  // Membrane conductance
  tau_chg = Rcell*C0*(1/(2*sigma_e) + 1/sigma_i)  // Membrane charging time
  Eapp = 0[V/cm]  // Applied electric field
  tstim = 1[ms]  // Duration of the stimulation pulse
  trise = 1[us]  // Rise time of the stimulation pulse
  tox = 1[us]  // Switching time for oxidation change
  tdelay1 = 10[ms]  // Delay the beginning of the stimulation pulse
  tdelay2 = 110[ms]  // Delay the change in Cm and Gm
  frac_ox = 0.1  // Areal fraction of the oxidized lesion
  area_ox = frac_ox*Acell  // Area of the oxidized lesion
  Acell = 4*pi*Rcell^2  // Area of the entire cell memebrane
  theta_ox = acos(1 - area_ox/(2*pi*Rcell^2))  // Angle for the oxidized lesion
  increase = 1  // Factor of increase for capacitance
  Gox = G0  // Conductance of the oxidized lesion
  rmesh = 3e-7

Functions
  an1: Analytic "Analytic pulse" | funcname = pulse1; expr = flc1hs(t-trise/2-tdelay1,trise/2)-flc1hs(t-tstim-1.5*trise-tdelay1,trise/2); args = t; argunit = s
  an2: Analytic "Analytic step" | funcname = pulse2; expr = flc1hs(t-tdelay2-tox/2,tox/2); args = t; argunit = s

Variables
  var14 "Membrane" on selection sel1
    theta = atan2(r,z)
    Um = V2-V
    u = Um/1[mV]
    GNa = gNa*m^3*h
    GK = gK*n^4
    GL = gL
    Jchannels = GNa*(Um-Er_Na) + GK*(Um-Er_K) + GL*(Um-Er_leak)
    Jcapacitive = Cm*d(Um,t) + d(Cm,t)*Um
    Jmem = Gm*Um + Jcapacitive + Jchannels
  var16 "NeuronalDynamics"
    alpha_n = 0.020e3[1/s]*(u-25)/(1-exp(-(u-25)/9))
    alpha_m = 0.182e3[1/s]*(u+35)/(1-exp(-(u+35)/9))
    alpha_h = 0.250e3[1/s]*exp(-(u+90)/12)
    beta_n = -0.002e3[1/s]*(u-25)/(1-exp((u-25)/9))
    beta_m = -0.124e3[1/s]*(u+35)/(1-exp((u+35)/9))
    beta_h = 0.250e3[1/s]*exp((u+62)/6)/exp((u+90)/12)
    Er_Na = 55[mV]
    Er_K = -77[mV]
    Er_leak = -65[mV]
    gNa = 40[mS/cm^2]
    gK = 35[mS/cm^2]
    gL = 0.3[mS/cm^2]
    Urest = -62.5[mV]
    m0 = 0.061
    n0 = 0.001
    h0 = 0.543
  var17 "Nonoxidized" on boundaries 8, 10
    Cm = C0
    Gm = G0
  var18 "Oxidized" on boundaries 9
    Cm = C0 + C0*(increase-1)*pulse2(t)
    Gm = G0 + Gox*pulse2(t)

Selections
  sel1: Explicit "Membrane" on boundaries 8-10

Geometry
  geom2 "Geometry 2" (2D axisymmetric, length unit m)
    e1: Ellipse | rot = -90; semiaxes = {Rcell, Rcell}; angle = 180
    r1: Rectangle | pos = {0, -del/2}; size = {del/2, del}
    pt1: Point | p = {Rcell*sin(theta_ox), Rcell*cos(theta_ox)}
    fin: Finalize "Form Union"

Materials
  mat1: Common "Material 1" on domains 1
    def "Basic"
      electricconductivity = sigma_e
      relpermittivity = epsilon_e
  mat2: Common "Material 2" on domains 2
    def "Basic"
      electricconductivity = sigma_i
      relpermittivity = epsilon_i

Physics
  ec: ConductiveMedia "Electric Currents" on domains 1
    dependent variable V
    cucn1: CurrentConservation (default)
    axi1: AxialSymmetry (default)
    ein1: ElectricInsulation (default)
    init1: init "Initial Values 1" (default)
    pot1: ElectricPotential on boundaries 2 | V0 = Eapp*del*pulse1(t)
    pot2: ElectricPotential on boundaries 6
    ncd1: NormalCurrentDensity on selection sel1
      nJ_type = J0
      nJ = +(GNa*(Um-Er_Na) + GK*(Um-Er_K) + GL*(Um-Er_leak))
      J0 = {Jmem*nr, 0, Jmem*nz}
  ec2: ConductiveMedia "Electric Currents 2" on domains 2
    dependent variable V2
    cucn1: CurrentConservation (default)
    axi1: AxialSymmetry (default)
    ein1: ElectricInsulation (default)
    init1: init "Initial Values 1" (default) | V2 = Urest
    ncd2: NormalCurrentDensity on selection sel1
      nJ_type = J0
      nJ = +(GNa*(Um-Er_Na) + GK*(Um-Er_K) + GL*(Um-Er_leak))
      J0 = {Jmem*nr, 0, Jmem*nz}
  bode: BoundaryODE "Boundary ODEs and DAEs" on selection sel1
    dependent variable m
    Units.CustomSourceTermUnit = 1/s
    dode1: DistributedODE (default) | f = (alpha_m*(1-m)-beta_m*m); da = 1
    init1: init "Initial Values 1" (default) | m = m0
  bode2: BoundaryODE "Boundary ODEs and DAEs 2" on selection sel1
    dependent variable n
    Units.CustomSourceTermUnit = 1/s
    dode1: DistributedODE (default) | f = (alpha_n*(1-n)-beta_n*n); da = 1
    init1: init "Initial Values 1" (default) | n = n0
  bode3: BoundaryODE "Boundary ODEs and DAEs 3" on selection sel1
    dependent variable h
    Units.CustomSourceTermUnit = 1/s
    dode1: DistributedODE (default) | f = (alpha_h*(1-h)-beta_h*h); da = 1
    init1: init "Initial Values 1" (default) | h = h0

Mesh
  mesh1 "Mesh 1"
    size: MeshSizeDefault | hmax = 1.34E-5; hmin = 6.0E-8; hcurve = 0.3; hgrad = 1.3
    ftri1: FreeTri "Free Triangular 1" on remaining entities
      size1: Size on selection sel1 | hmax = 3e-7; custom = on
      size2: Size on points 6 | hmax = rmesh; hgrad = 1.2; custom = on

Studies
  std14 "Study 0: Init"
    time: Transient "Time Dependent" | tlist = range(0,1e-3,100e-3)
  std15 "Study 1: Stimulation 1ms"
    param: Parametric "Parametric Sweep" | pname = Eapp; plistarr = 0, range(10,1,14); punit = V/cm
    time: Transient "Time Dependent"
      tlist = range(0,1e-3,10e-3) 10e-3+10^{range(-8,(-3+8)/50,-3)} range(11e-3,1e-4,17e-3) range(17e-3,1e-3,100e-3)
      useinitsol = on
      initmethod = sol
      initstudy = std14
  std16 "Study 2: Stimulation 200ns"
    param: Parametric "Parametric Sweep"
      sweeptype = filled
      pname = {Eapp, tstim, trise}
      plistarr = {"0, range(1,1,4)", 200, 20}
      punit = {kV/cm, ns, ns}
    time: Transient "Time Dependent"
      tlist = range(0,1e-3,10e-3) 10e-3+10^{range(-9,(-3+9)/150,-3)} range(11e-3,1e-4,17e-3) range(17e-3,1e-3,100e-3)
      useinitsol = on
      initmethod = sol
      initstudy = std14
  std9 "Study 6: EE13-50per"
    param1: Parametric "Parametric Sweep 1"
      sweeptype = filled
      pname = {increase, Gox, frac_ox, rmesh}
      plistarr = {1.13, 0.19, range(0.17,0.01,0.23), 1e-8}
      punit = {, S/m^2, , }
    time1: Transient "Time Dependent 1"
      tlist = range(0,10e-3,110e-3) 110e-3+10^{range(-8,(-3+8)/50,-3)} range(111e-3,1e-4,117e-3) range(117e-3,1e-3,200e-3)
  std10 "Study 7: EE13-100per"
    param2: Parametric "Parametric Sweep 2"
      sweeptype = filled
      pname = {increase, Gox, frac_ox, rmesh}
      plistarr = {1.5, 26, range(1.5e-3,1e-4,2e-3), 1e-8}
      punit = {, S/m^2, , }
    time2: Transient "Time Dependent 2"
      tlist = range(0,10e-3,110e-3) 110e-3+10^{range(-8,(-3+8)/50,-3)} range(111e-3,1e-4,117e-3) range(117e-3,1e-3,200e-3)
      useinitsol = on
  std11 "Study 8: PoxnoPC-10per"
    param3: Parametric "Parametric Sweep 3"
      sweeptype = filled
      pname = {increase, Gox, frac_ox, rmesh}
      plistarr = {1.19, 0.5, range(0.075,0.001,0.08), 1e-8}
      punit = {, S/m^2, , }
    time3: Transient "Time Dependent 3"
      tlist = range(0,10e-3,110e-3) 110e-3+10^{range(-8,(-3+8)/50,-3)} range(111e-3,1e-4,117e-3) range(117e-3,1e-3,200e-3)
      useinitsol = on
  std12 "Study 9: PoxnoPC-20per"
    param4: Parametric "Parametric Sweep 4"
      sweeptype = filled
      pname = {increase, Gox, frac_ox, rmesh}
      plistarr = {1.24, 2, range(0.018,0.001,0.022), 1e-8}
      punit = {, S/m^2, , }
    time4: Transient "Time Dependent 4"
      tlist = range(0,10e-3,110e-3) 110e-3+10^{range(-8,(-3+8)/50,-3)} range(111e-3,1e-4,117e-3) range(117e-3,1e-3,200e-3)
  std13 "Study 10: PoxnoPC-50per"
    param4: Parametric "Parametric Sweep 4"
      sweeptype = filled
      pname = {increase, Gox, frac_ox, rmesh}
      plistarr = {1.82, 2000, range(0.5e-5,5e-6,2.5e-5), 1e-8}
      punit = {, S/m^2, , }
    time4: Transient "Time Dependent 4"
      tlist = range(0,10e-3,110e-3) 110e-3+10^{range(-8,(-3+8)/50,-3)} range(111e-3,1e-4,117e-3) range(117e-3,1e-3,200e-3)
  std17 "Study 11: ForLesionPlots"
    param: Parametric "Parametric Sweep"
      sweeptype = filled
      pname = {frac_ox, tdelay2}
      plistarr = {"0.0001,0.001,0.01,0.1", 0}
      punit = {, s}
    time: Transient "Time Dependent" | tlist = range(0,0.1,0.1)

Solver configurations
  sol183 "Solution 183" (study std9)
    v1: Variables "Dependent Variables 1"
    t1: Time "Time-Dependent Solver 1"
      tlist = range(0,10e-3,110e-3) 110e-3+10^{range(-8,(-3+8)/50,-3)} range(111e-3,1e-4,117e-3) range(117e-3,1e-3,200e-3)
      tstepsbdf = strict
      dDef: Direct
      fc1: FullyCoupled
  sol249 "Solution 249" (study std10)
    // same settings as sol183
  sol256 "Solution 256" (study std11)
    // same settings as sol183
  sol269 "Solution 269" (study std12)
    // same settings as sol183
  sol270 "Solution 270" (study std13)
    // same settings as sol183
  sol309 "Solution 309" (study std14)
    v1: Variables "Dependent Variables 1"
    t1: Time "Time-Dependent Solver 1" | tlist = range(0,1e-3,100e-3); tstepsbdf = strict
      dDef: Direct
      fc1: FullyCoupled
  sol310 "Solution 310" (study std15)
    v1: Variables "Dependent Variables 1" | initmethod = sol
    t1: Time "Time-Dependent Solver 1"
      tlist = range(0,1e-3,10e-3) 10e-3+10^{range(-8,(-3+8)/50,-3)} range(11e-3,1e-4,17e-3) range(17e-3,1e-3,100e-3)
      tstepsbdf = strict
      dDef: Direct
      fc1: FullyCoupled
  sol311 "Solution 311" (study std16)
    v1: Variables "Dependent Variables 1" | initmethod = sol
    t1: Time "Time-Dependent Solver 1"
      tlist = range(0,1e-3,10e-3) 10e-3+10^{range(-9,(-3+9)/150,-3)} range(11e-3,1e-4,17e-3) range(17e-3,1e-3,100e-3)
      tstepsbdf = strict
      dDef: Direct
      fc1: FullyCoupled
  sol385 "Solution 385" (study std17)
    v1: Variables "Dependent Variables 1"
    t1: Time "Time-Dependent Solver 1" | tlist = range(0,0.1,0.1)
      dDef: Direct
      fc1: FullyCoupled